Simulations: Version=171
  DataStore
  Folder Replacements
    Plant SCRUM: PlantType=SCRUM
      Memo TitlePage
        # SCRUM: the Simple Crop Resource Uptake Model

        _Hamish Brown and Rob Zyskowski, Plant and Food Research, New Zealand_

        This model has been built using the Plant Modelling Framework (PMF) of [brown_plant_2014] to simulate a range of different crops in simulations where water and nitrogen balance are of interest but a fully mechanistic plant model is not needed or is not available. It is a daily time step implementation of the crop model that is used on the Overseer nutrient balance model [Cichota_etal_2010].  It uses simple sigmoidal functions for estimating daily cover and biomass deltas to give realistic water and nitrogen demands. It does not simulate potential yield, this is specified as an input. Yield will be reduced below the specified potential yield if N or water supplies from the soil are insufficient to meet demand. The model has been paramaterised for simulating water and nitrogen balances of cropping rotations in New Zealand (where over 50 different crop types are grown and it is not feasible to produce full crop models for each of these).  Because of this the model is not as generically applicable as full APSIM crop models.   It may be adapted for other purposes and other crop types may be added but the user will need to keep in mind that because it is a simple model the the parameters might need changing for crops in different locations or for crops sown at different times of the year.  Some sensibility testing or validation is recommended before application in different sutuations.

        SCRUM has a simple phenology model which divides the crop growth into three main phases; a vegetative phase when the canopy is expanding, a reproductive phase when product is being formed and a senescing phase when the canopy is contracting.  SCRUM has 4 organ classes to represent different biomass components and the real biomass components that these classes represent changes from crop to crop:
           1. A Simple leaf class called <b>Stover</b> which represents the unharvested parts of the plant.  Generally, this represents the leaf and stem components of the crop but for crops where stem and leaf are part of the harvested product (e.g forages and leafy vegetables) than stover is the residual fraction of leaf and stem that is not harvested.
           2. A Generic organ class called <b>Product</b> which represents the plant parts that are harvested and removed from the field.  This could represent grain, fruits, tubers, leaf or stem depending on what sort of crop is being represented.
           3. A Root organ which extracts water and nitrogen from the soil for plant growth and returns biomass to the soil on harvest
           4. A Nodule organ which is only activated and fixes nitrogen for the legume crops.
        An Arbitrator is also included which determines the allocation of drymatter and nitrogen biomass between each of these organs.

        #Inclusion in APSIM simulations
        A scrum crop is included in a simulation the same as any other APSIM crop
         * The SCRUM object needs to be dragged or copied from the Crop folder in the tool box into the field of your simulation.
         * It is then planted with a sowing rule
        ~~~
        SCRUM.Sow(cultivar: Wheat_Autumn, population: 1, depth: 10, rowSpacing: 150);
        ~~~
          * Note that SCRUM has no notion of population or rowSpacing but these parameters are required by the Sow method so filler values are provided
          * To specify an expected Expected Yield that differs to the defalt value provided, included the following code in a manager script to be executed on the day of sowing.
        ~~~
         zone.Set("[SCRUM].Product.ExpectedYield.Value()", ResetValue);
        ~~~
        * SCRUM can be Harvested, Cut, Grazed and Pruned like other crops.  Defalt proportions of the biomass in each organ are removed from the sysem and/or added to the fields residue pools.  Note that defalt removal fraction for product on harvest is 0 (becaue it is represented with a generic organ) so more appropriate removal fractions should be sepcified in a manager script as follows:
        ~~~
        [EventSubscribe("Commencing")]
        private void OnSimulationCommencing(object sender, EventArgs e)
        {
          Remove = new RemovalFractions(SCRUM.Organs);
        }
        [EventSubscribe("DoManagement")]
        private void OnDoManagement(object sender, EventArgs e)
        {
          if (Clock.Today.Date == HarvestDate2)
          {
            Remove.SetFractionLiveToRemove("Product", 1.0);
            Remove.SetFractionLiveToRemove("Stover", 0.05);
            Remove.SetFractionLiveToResidue("Stover",0.95)
            SCRUM.Harvest(Remove);
            SCRUM.EndCrop();
          }
        }
        ~~~
        * A Remove class as shown above can be sent with Harvest, Cut, Graze and Prune events to specificy the proportions of removals.
         * Once a crop has been ended the field is open to plant another crop using another APSIM crop model or sowing another SCRUM crop.
      Phenology
        Memo Description
          As ThermalTime accumulates the crop progresses through the following phases:
        WeightedTemperatureFunction ThermalTime: MaximumTemperatureWeighting=0.5
          XYPairs: X=[0, 30, 40]; Y=[0, 30, 0]
        GenericPhase Seed: Start=Seed; End=Emergence; IsEmerged=false
          Memo Description
            The phase that runs from sowing until the seedlings are emerge
          Constant Target: FixedValue=0; Units=<sup>o</sup>Cd
            Memo Param value set at establishment
              SCRUM calculates this parameter value during run-time when the crop is established from parameter values set in the relevent SCRUMcrop and SCRUMmanagement objects
          VariableReference Progression: VariableName=[Phenology].ThermalTime
        GenericPhase Seedling: Start=Emergence; End=Seedling; IsEmerged=true
          Memo Description
            The phase that runs from emergence until the seedlings are established (later that emergence)
          Constant Target: FixedValue=0; Units=<sup>o</sup>Cd
            Memo Param value set at establishment
              SCRUM calculates this parameter value during run-time when the crop is established from parameter values set in the relevent SCRUMcrop and SCRUMmanagement objects
          VariableReference Progression: VariableName=[Phenology].ThermalTime
        GenericPhase Vegetative: Start=Seedling; End=Vegetative; IsEmerged=true
          Memo Description
            During the vegetative phase the crop is producing leaf and stem and closing its canopy
          Constant Target: FixedValue=0; Units=<sup>o</sup>Cd
            Memo Param value set at establishment
              SCRUM calculates this parameter value during run-time when the crop is established from parameter values set in the relevent SCRUMcrop and SCRUMmanagement objects
          VariableReference Progression: VariableName=[Phenology].ThermalTime
        GenericPhase EarlyReproductive: Start=Vegetative; End=EarlyReproductive; IsEmerged=true
          Memo Description
            During the early reproductive stage the crop will be flowering
          Constant Target: FixedValue=0; Units=<sup>o</sup>Cd
            Memo Param value set at establishment
              SCRUM calculates this parameter value during run-time when the crop is established from parameter values set in the relevent SCRUMcrop and SCRUMmanagement objects
          VariableReference Progression: VariableName=[Phenology].ThermalTime
        GenericPhase MidReproductive: Start=EarlyReproductive; End=MidReproductive; IsEmerged=true
          Memo Description
            During this plant has started grain filling.
          Constant Target: FixedValue=0; Units=<sup>o</sup>Cd
            Memo Param value set at establishment
              SCRUM calculates this parameter value during run-time when the crop is established from parameter values set in the relevent SCRUMcrop and SCRUMmanagement objects
          VariableReference Progression: VariableName=[Phenology].ThermalTime
        GenericPhase LateReproductive: Start=MidReproductive; End=LateReproductive; IsEmerged=true
          Memo Description
            During this phase the crop is completing grain filling
          Constant Target: FixedValue=0; Units=<sup>o</sup>Cd
            Memo Param value set at establishment
              SCRUM calculates this parameter value during run-time when the crop is established from parameter values set in the relevent SCRUMcrop and SCRUMmanagement objects
          VariableReference Progression: VariableName=[Phenology].ThermalTime
        GenericPhase Maturity: Start=LateReproductive; End=Maturity; IsEmerged=true
          Memo Description
            Grain filling is nearly complete
          Constant Target: FixedValue=0; Units=<sup>o</sup>Cd
            Memo Param value set at establishment
              SCRUM calculates this parameter value during run-time when the crop is established from parameter values set in the relevent SCRUMcrop and SCRUMmanagement objects
          VariableReference Progression: VariableName=[Phenology].ThermalTime
        GenericPhase Ripe: Start=Maturity; End=Ripe; IsEmerged=true
          Memo Description
            During this phase grains are drying down to be ready for harvest
          Constant Target: FixedValue=0; Units=<sup>o</sup>Cd
            Memo Param value set at establishment
              SCRUM calculates this parameter value during run-time when the crop is established from parameter values set in the relevent SCRUMcrop and SCRUMmanagement objects
          VariableReference Progression: VariableName=[Phenology].ThermalTime
        EndPhase ReadyForHarvesting: Start=Ripe; End=Unused; IsEmerged=true
          VariableReference ThermalTime: VariableName=[Phenology].ThermalTime
      OrganArbitrator Arbitrator
        BiomassTypeArbitrator DMArbitration
          Folder PotentialPartitioningMethods
            ReallocationMethod
            AllocateFixationMethod
            RetranslocationMethod
            SendPotentialDMAllocationsMethod
          Folder AllocationMethods
            NutrientConstrainedAllocationMethod
            DryMatterAllocationsMethod
          RelativeAllocation ArbitrationMethod
        BiomassTypeArbitrator NArbitration
          Folder PotentialPartitioningMethods
            ReallocationMethod
          Folder ActualPartitioningMethods
            AllocateFixationMethod
            RetranslocationMethod
          Folder AllocationMethods
            NitrogenAllocationsMethod
          RelativeAllocation ArbitrationMethod
          AllocateUptakesMethod
        WaterUptakeMethod
        NitrogenUptakeMethod
      GenericOrgan Product: IsAboveGround=true
        Memo Description
          It is the biomass that is removed from the crop at harvest and may include grain, root, leaf, stem, pod or any other organ type depending on the type of crop and how it is harvested.
        Constant MaxNConcAtMaturity: FixedValue=0
          Memo Param value set at establishment
            SCRUM calculates this parameter value during run-time when the crop is established from parameter values set in the relevent SCRUMcrop and SCRUMmanagement objects
        AddFunction MaximumNConc
          VariableReference MaxNConcAtMaturity: VariableName=[Product].MaxNConcAtMaturity
          MultiplyFunction EarlyNConcElevation
            SubtractFunction
              VariableReference MaxNConcAtSeedling: VariableName=[SCRUM].MaxNConcAtSeedling
              VariableReference MaxNConcAtMaturity: VariableName=[Product].MaxNConcAtMaturity
            LinearInterpolationFunction DilutionCurve
              XYPairs: X=[1, 3, 4, 5, 6, 7]; Y=[1, 1, 0.1, 0.02, 0, 0]
              VariableReference XValue: VariableName=[Phenology].Stage
        MultiplyFunction CriticalNConc
          VariableReference MaxNConcAtMaturity: VariableName=[Product].MaxNConcAtMaturity
          Constant StructuralNFactor: FixedValue=0.6
        MultiplyFunction MinimumNConc
          VariableReference MaxNConcAtMaturity: VariableName=[Product].MaxNConcAtMaturity
          Constant StructuralNFactor: FixedValue=0.6
        Constant NReallocationFactor: FixedValue=0
        Constant RemobilisationCost: FixedValue=0
        Constant ExpectedYield: FixedValue=0
          Memo Param value set at establishment
            SCRUM calculates this parameter value during run-time when the crop is established from parameter values set in the relevent SCRUMcrop and SCRUMmanagement objects
        Constant DryMatterContent: FixedValue=0
          Memo Param value set at establishment
            SCRUM calculates this parameter value during run-time when the crop is established from parameter values set in the relevent SCRUMcrop and SCRUMmanagement objects
        SubtractFunction WaterContent
          Memo Description
            This is used to convert the total Dry Matter of this organ back to fresh mass once daily partitining is complete.
          Constant One: FixedValue=1
          VariableReference DMcontent: VariableName=[Product].DryMatterContent
        MultiplyFunction DryYield
          Memo Description
            This variable is the product yield at harvest time of the crop in g/m2 dry weight
          VariableReference FreshYld: VariableName=[Product].ExpectedYield
          VariableReference DMPercent: VariableName=[Product].DryMatterContent
        ExpressionFunction Yield: Expression=(divide(1,[Product].DryMatterContent,0)*[Product].Wt)/100
          Memo Description
            Fresh yield (DM and moisture content) in t/ha
        Constant HarvestIndex: FixedValue=0
          Memo Param value set at establishment
            SCRUM calculates this parameter value during run-time when the crop is established from parameter values set in the relevent SCRUMcrop and SCRUMmanagement objects
        Constant SenescenceRate: FixedValue=0; Units=/d
        BiomassRemoval BiomassRemovalDefaults: HarvestFractionLiveToRemove=1; HarvestFractionDeadToRemove=1; HarvestFractionLiveToResidue=0; HarvestFractionDeadToResidue=0
        Constant DetachmentRateFunction: FixedValue=0; Units=/d
        Constant MaintenanceRespirationFunction: FixedValue=0; Units=0-1
        Constant DMConversionEfficiency: FixedValue=1; Units=0-1
        Constant NRetranslocationFactor: FixedValue=0
        Constant NitrogenDemandSwitch: FixedValue=1
        Constant DMReallocationFactor: FixedValue=0
        Constant DMRetranslocationFactor: FixedValue=0
        Constant CarbonConcentration: FixedValue=0.4
        NutrientDemandFunctions DMDemands
          MultiplyFunction Structural
            PartitionFractionDemandFunction DMDemandFunction
              SubtractFunction PartitionFraction
                Constant One: FixedValue=1
                VariableReference RootFraction: VariableName=[Root].RootProportion
                VariableReference StoverFraction
                  VariableName=[Stover].DMDemands.Structural.DMDemandFunction.PartitionFraction
            Constant StructuralFraction: FixedValue=1; Units=0-1
          Constant Metabolic: FixedValue=0
          Constant Storage: FixedValue=0
          Constant QStructuralPriority: FixedValue=1
          Constant QMetabolicPriority: FixedValue=1
          Constant QStoragePriority: FixedValue=1
        NutrientDemandFunctions NDemands
          MultiplyFunction Structural
            VariableReference MinNconc: VariableName=[Product].minimumNconc
            VariableReference PotentialDMAllocation: VariableName=[Product].potentialDMAllocation.Structural
          MultiplyFunction Metabolic
            SubtractFunction MetabolicNconc
              VariableReference CritNconc: VariableName=[Product].criticalNConc
              VariableReference MinNconc: VariableName=[Product].minimumNconc
            VariableReference PotentialDMAllocation: VariableName=[Product].potentialDMAllocation.Structural
          StorageNDemandFunction Storage
            VariableReference NitrogenDemandSwitch: VariableName=[Product].nitrogenDemandSwitch
            VariableReference MaxNconc: VariableName=[Product].MaximumNconc
          Constant QStructuralPriority: FixedValue=1
          Constant QMetabolicPriority: FixedValue=1
          Constant QStoragePriority: FixedValue=1
        RetranslocateNonStructural RetranslocateNitrogen
        NutrientPoolFunctions InitialWt
          Constant Structural: FixedValue=0; Units=g/m^2
          Constant Metabolic: FixedValue=0
          Constant Storage: FixedValue=0
        Constant Photosynthesis: FixedValue=0
        VariableReference initialNConcFunction: VariableName=[Product].MaximumNConc
      SimpleLeaf Stover: Albedo=0.18; Gsmax350=0.01; R50=150; LeafInitialisationStage=Emergence; Height=0; BaseHeight=0; Width=0; FRGR=0; PotentialEP=0; WaterDemand=0; KDead=0.1; LAIDead=0
        Memo Description
          Stover represents any part of the crop that is not removed at harvest (i.e not part of the product).
        Constant StomatalConductanceCO2Modifier: FixedValue=1
        Constant NReallocationFactor: FixedValue=0
        Constant RemobilisationCost: FixedValue=0
        Constant SenescenceRate: FixedValue=0
        Constant DetachmentRate: FixedValue=0; Units=/d
        Constant InitialWt: FixedValue=0; Units=g/m2
        MultiplyFunction Photosynthesis
          DeltaFunction UnStressedBiomass: StartStageName=Emergence
            SigmoidFunction Integral
              SubtractFunction Ymax
                VariableReference FinalBiomass: VariableName=[Scrum].TotalDMAtHarvest
                AddFunction InitialBiomass
                  VariableReference InitialStover: VariableName=[Scrum].Stover.InitialWt
                  VariableReference InitialProduct: VariableName=[Scrum].Product.InitialWt.Structural
                  VariableReference InitialRoot: VariableName=[Scrum].Root.InitialWt.Structural
              VariableReference XValue: VariableName=[Phenology].AccumulatedEmergedTT
              Constant Xo: FixedValue=0
                Memo Param value set at establishment
                  SCRUM calculates this parameter value during run-time when the crop is established from parameter values set in the relevent SCRUMcrop and SCRUMmanagement objects
              Constant b: FixedValue=0
                Memo Param value set at establishment
                  SCRUM calculates this parameter value during run-time when the crop is established from parameter values set in the relevent SCRUMcrop and SCRUMmanagement objects
          LinearInterpolationFunction WaterStressFactor
            XYPairs: X=[0, 1]; Y=[0, 1]
            VariableReference XValue: VariableName=[Stover].Fw
        MinimumFunction FRGR
          SubDailyInterpolation FRGRFunctionTemp: agregationMethod=0
            XYPairs Response: X=[0, 10, 25, 40]; Y=[0, 1, 1, 0]
            ThreeHourAirTemperature InterpolationMethod
        PhaseLookup LaiDead
          PhaseLookupValue Expanding: Start=Emergence; End=MidReproductive
            Constant: FixedValue=0
          PhaseLookupValue Senescence: Start=MidReproductive; End=Maturity
            MultiplyFunction SenescingLAI
              HoldFunction MaxLAI: WhenToHold=MidReproductive
                VariableReference ValueToHold: VariableName=[Stover].LAI
              SubtractFunction ProportionLost
                Constant One: FixedValue=1
              DivideFunction ProportionSenesced
                SubtractFunction TTSenesce
                  VariableReference AccumulatedThermalTime: VariableName=[Phenology].AccumulatedEmergedTT
                  AddFunction ThermalTimeAtStartSenescence
                    VariableReference Seedling: VariableName=[Phenology].Seedling.Target
                    VariableReference Vegetative: VariableName=[Phenology].Vegetative.Target
                    VariableReference EarlyReproductive: VariableName=[Phenology].EarlyReproductive.Target
                    VariableReference MidReproductive: VariableName=[Phenology].MidReproductive.Target
                AddFunction SenescentPhaseDuration
                  VariableReference LateReproductive: VariableName=[Phenology].LateReproductive.Target
                  VariableReference Maturity: VariableName=[Phenology].Maturity.Target
        AddFunction Cover
          AccumulateFunction Growth: StartStageName=Seed; EndStageName=Maturity; FractionRemovedOnCut=0; FractionRemovedOnHarvest=0; FractionRemovedOnGraze=0; FractionRemovedOnPrune=0
            MultiplyFunction Expansion
              DeltaFunction Delta: StartStageName=Seed
                SigmoidFunction Integral
                  Constant Ymax: FixedValue=0.97
                    Memo Param value set at establishment
                      SCRUM calculates this parameter value during run-time when the crop is established from parameter values set in the relevent SCRUMcrop and SCRUMmanagement objects
                  VariableReference XValue: VariableName=[Phenology].AccumulatedEmergedTT
                  Constant Xo: FixedValue=403.8
                    Memo Param value set at establishment
                      SCRUM calculates this parameter value during run-time when the crop is established from parameter values set in the relevent SCRUMcrop and SCRUMmanagement objects
                  Constant b: FixedValue=80.75
                    Memo Param value set at establishment
                      SCRUM calculates this parameter value during run-time when the crop is established from parameter values set in the relevent SCRUMcrop and SCRUMmanagement objects
              LinearInterpolationFunction WaterStressFactor
                XYPairs: X=[0.5, 1]; Y=[0, 1]
                VariableReference XValue: VariableName=[Stover].Fw
            PhaseLookupValue Senescence: Start=MidReproductive; End=Maturity
              DeltaFunction Delta: StartStageName=Seed
                MultiplyFunction Integral
                  HoldFunction MaxCover: WhenToHold=MidReproductive
                    VariableReference ValueToHold: VariableName=[Stover].CoverGreen
                  SubtractFunction ProportionLost
                    Constant One: FixedValue=1
                    DivideFunction ProportionRemaining: same as Replacements.SCRUM.Stover.LaiDead.Senescence.SenescingLAI.ProportionSenesced
          Constant InitialCover: FixedValue=0; Units=g/m2
        Constant ExtinctionCoefficient: FixedValue=0
          Memo Param value set at establishment
            SCRUM calculates this parameter value during run-time when the crop is established from parameter values set in the relevent SCRUMcrop and SCRUMmanagement objects
        SigmoidFunction HeightFunction
          Constant Ymax: FixedValue=0
            Memo Param value set at establishment
              SCRUM calculates this parameter value during run-time when the crop is established from parameter values set in the relevent SCRUMcrop and SCRUMmanagement objects
          VariableReference XValue: VariableName=[Phenology].AccumulatedEmergedTT
          Constant Xo: FixedValue=0
            Memo Param value set at establishment
              SCRUM calculates this parameter value during run-time when the crop is established from parameter values set in the relevent SCRUMcrop and SCRUMmanagement objects
          Constant b: FixedValue=0
            Memo Param value set at establishment
              SCRUM calculates this parameter value during run-time when the crop is established from parameter values set in the relevent SCRUMcrop and SCRUMmanagement objects
        Constant MaxNConcAtMaturity: FixedValue=0
          Memo Param value set at establishment
            SCRUM calculates this parameter value during run-time when the crop is established from parameter values set in the relevent SCRUMcrop and SCRUMmanagement objects
        AddFunction MaximumNConc
          VariableReference MaxNConcAtMaturity: VariableName=[Stover].MaxNConcAtMaturity
          MultiplyFunction EarlyNConcElevation
            SubtractFunction
              VariableReference MaxNConcAtSeedling: VariableName=[SCRUM].MaxNConcAtSeedling
              VariableReference MaxNConcAtMaturity: VariableName=[Stover].MaxNConcAtMaturity
            LinearInterpolationFunction DilutionCurve
              XYPairs: X=[1, 3, 4, 5, 6, 7, 8]; Y=[1, 1, 0.1, 0.02, 0, 0, 0]
              VariableReference XValue: VariableName=[Phenology].Stage
        MultiplyFunction CriticalNConc
          VariableReference MaxNConcAtMaturity: VariableName=[Stover].MaxNConcAtMaturity
          Constant StructuralNFactor: FixedValue=0.6
        MultiplyFunction MinimumNConc
          VariableReference MaxNConcAtMaturity: VariableName=[Stover].MaxNConcAtMaturity
          Constant StructuralNFactor: FixedValue=0.6
        Constant NitrogenDemandSwitch: FixedValue=1
        SubtractFunction DMAtHarvest
          MultiplyFunction AboveGroundDMAtHarvest
            VariableReference ProductDM: VariableName=[Product].DryYield
            DivideFunction InvertedHI
              Constant One: FixedValue=1
              VariableReference HarvestIndex: VariableName=[Product].HarvestIndex
          VariableReference ProductDMAtHarvest: VariableName=[Product].DryYield
        BiomassRemoval BiomassRemovalDefaults: HarvestFractionLiveToRemove=0; HarvestFractionDeadToRemove=0; HarvestFractionLiveToResidue=1; HarvestFractionDeadToResidue=1
        Constant MaintenanceRespiration: FixedValue=0; Units=0-1
        Constant DMConversionEfficiency: FixedValue=1; Units=0-1
        Constant NRetranslocationFactor: FixedValue=0
        Constant DMReallocationFactor: FixedValue=0
        Constant DMRetranslocationFactor: FixedValue=0
        Constant CarbonConcentration: FixedValue=0.4
        NutrientDemandFunctions DMDemands
          MultiplyFunction Structural
            PartitionFractionDemandFunction DMDemandFunction
              Memo Description
                DM demand is based on a simple partitioning coefficients.  At harvest the biomass partitioned to the stover = TotalDM * (1 - RootProportion) * (1 - Harvest index).  However the partitioningFraction is more complicated that this as it partitions more biomass to the stover in the CanopyExpanding Phase and less in the Yield increasing phase to give realistic patterns of accumulation of biomass in the Stover and Product over the duration of the crop
              DivideFunction PartitionFraction
                VariableReference StoverDMAtHarvest: VariableName=[Stover].DMAtHarvest
                VariableReference TotalDMAtHarvest: VariableName=[Scrum].TotalDMAtHarvest
            Constant StructuralFraction: FixedValue=1; Units=0-1
          Constant Metabolic: FixedValue=0
          Constant Storage: FixedValue=0
          Constant QStructuralPriority: FixedValue=1
          Constant QMetabolicPriority: FixedValue=1
          Constant QStoragePriority: FixedValue=1
        NutrientDemandFunctions NDemands
          MultiplyFunction Structural
            VariableReference MinNconc: VariableName=[Stover].minimumNconc
            VariableReference PotentialDMAllocation: VariableName=[Stover].potentialDMAllocation.Structural
          MultiplyFunction Metabolic
            SubtractFunction MetabolicNconc
              VariableReference CritNconc: VariableName=[Stover].criticalNConc
              VariableReference MinNconc: VariableName=[Stover].minimumNconc
            VariableReference PotentialDMAllocation: VariableName=[Stover].potentialDMAllocation.Structural
          StorageNDemandFunction Storage
            VariableReference NitrogenDemandSwitch: VariableName=[Stover].nitrogenDemandSwitch
            VariableReference MaxNconc: VariableName=[Stover].MaximumNconc
          Constant QStructuralPriority: FixedValue=1
          Constant QMetabolicPriority: FixedValue=1
          Constant QStoragePriority: FixedValue=1
      Root: GrowthRespiration=0; MaintenanceRespiration=0
        RootShapeCylinder RootShape
        Memo Description
          The root organ demands and is partitioned N and DM and its depth increases through time to provide a water uptake supply
        Constant DMConversionEfficiency: FixedValue=1; Units=0-1
        Constant RemobilisationCost: FixedValue=0
        KLModiferVsDepthFunction KLModifier
          VariableReference LayerDepth: VariableName=[Physical].DepthMidPoints
          VariableReference MaximumRootDepth: VariableName=[Root].MaximumRootDepth
        Constant SoilWaterEffect: FixedValue=1
        Constant MaxDailyNUptake: FixedValue=12
        Constant SenescenceRate: FixedValue=0
        Constant MaximumNConc: FixedValue=0
          Memo Param value set at establishment
            SCRUM calculates this parameter value during run-time when the crop is established from parameter values set in the relevent SCRUMcrop and SCRUMmanagement objects
        VariableReference CriticalNConc: VariableName=[Root].MaximumNConc
        VariableReference MinimumNConc: VariableName=[Root].MaximumNConc
        Constant NitrogenDemandSwitch: FixedValue=1
        Constant MaximumRootDepth: FixedValue=0
          Memo Param value set at establishment
            SCRUM calculates this parameter value during run-time when the crop is established from parameter values set in the relevent SCRUMcrop and SCRUMmanagement objects
        MultiplyFunction RootFrontVelocity
          LessThanFunction RootFrontVelocity
            VariableReference TestVariable: VariableName=[Phenology].AccumulatedEmergedTT
            AddFunction GrowthDuration
              VariableReference Emerging: VariableName=[Phenology].Seed.Target
              VariableReference Seedling: VariableName=[Phenology].Seedling.Target
              VariableReference Vegetative: VariableName=[Phenology].Vegetative.Target
              VariableReference EarlyReproductive: VariableName=[Phenology].EarlyReproductive.Target
            DivideFunction IfTrue
              VariableReference MaxRootDepth: VariableName=[Root].MaximumRootDepth
              VariableReference GrowthDuration: VariableName=[Root].RootFrontVelocity.RootFrontVelocity.GrowthDuration
            Constant IfFalse: FixedValue=0
          VariableReference ThermalTime: VariableName=[Phenology].ThermalTime
        Constant RootProportion: FixedValue=0.1
          Memo Param value set at establishment
            SCRUM calculates this parameter value during run-time when the crop is established from parameter values set in the relevent SCRUMcrop and SCRUMmanagement objects
        BiomassRemoval BiomassRemovalDefaults: HarvestFractionLiveToRemove=0; HarvestFractionDeadToRemove=0; HarvestFractionLiveToResidue=1; HarvestFractionDeadToResidue=1
        Constant SpecificRootLength: FixedValue=40; Units=m/g
        LinearInterpolationFunction KNO3
          XYPairs: X=[0, 0.003]; Y=[0.02, 0.02]
          VariableReference XValue: VariableName=[Root].LengthDensity
        LinearInterpolationFunction KNH4
          XYPairs: X=[0, 0.003]; Y=[0, 0]
          VariableReference XValue: VariableName=[Root].LengthDensity
        LinearInterpolationFunction NUptakeSWFactor
          XYPairs: X=[0, 1]; Y=[0, 1]
          VariableReference XValue: VariableName=[Root].RWC
        Constant MaintenanceRespirationFunction: FixedValue=0
        Constant CarbonConcentration: FixedValue=0.4
        NutrientDemandFunctions DMDemands
          MultiplyFunction Structural
            PartitionFractionDemandFunction DMDemandFunction
              VariableReference PartitionFraction: VariableName=[Root].RootProportion
            Constant StructuralFraction: FixedValue=1
          Constant Metabolic: FixedValue=0
          Constant Storage: FixedValue=0
          Constant QStructuralPriority: FixedValue=1
          Constant QMetabolicPriority: FixedValue=1
          Constant QStoragePriority: FixedValue=1
        NutrientDemandFunctions NDemands
          MultiplyFunction Structural
            VariableReference MinNconc: VariableName=[Root].minimumNconc
            VariableReference PotentialDMAllocation: VariableName=[Root].potentialDMAllocation.Structural
          Constant Metabolic: FixedValue=0
          Constant Storage: FixedValue=0
          Constant QStructuralPriority: FixedValue=1
          Constant QMetabolicPriority: FixedValue=1
          Constant QStoragePriority: FixedValue=1
        NutrientPoolFunctions InitialWt
          Constant Structural: FixedValue=0; Units=g/m2
          Constant Metabolic: FixedValue=0
          Constant Storage: FixedValue=0
      Nodule
        Memo Description
          The nodule organ is unparameterised and simply has a switch that is turned on for legume crops (so they can fix what ever N the crop demands) and switched off for non legume crops (which fix no N)
        Constant MaximumNConc: FixedValue=0
        Constant CriticalNConc: FixedValue=0
        Constant MinimumNConc: FixedValue=0
        Constant RemobilisationCost: FixedValue=0
        Constant NReallocationFactor: FixedValue=0
        Constant SenescenceRate: FixedValue=0
        MultiplyFunction FixationRate
          Constant MaximumFixation: FixedValue=0.03; Units=g N / g Photosynthesis
          VariableReference DailyPhotosynthesis: VariableName=[Stover].Photosynthesis
          VariableReference LegumePropn: VariableName=[SCRUM].LegumePropn
        BiomassRemoval BiomassRemovalDefaults: HarvestFractionLiveToRemove=0; HarvestFractionDeadToRemove=0; HarvestFractionLiveToResidue=0; HarvestFractionDeadToResidue=0
        Constant InitialWtFunction: FixedValue=0; Units=g/m^2
        Constant DetachmentRateFunction: FixedValue=0; Units=/d
        Constant FixationMetabolicCost: FixedValue=0
        Constant MaintenanceRespirationFunction: FixedValue=0; Units=0-1
        Constant DMConversionEfficiency: FixedValue=1; Units=0-1
        Constant NRetranslocationFactor: FixedValue=0
        Constant NitrogenDemandSwitch: FixedValue=0
        Constant DMReallocationFactor: FixedValue=0
        Constant DMRetranslocationFactor: FixedValue=0
        Constant CarbonConcentration: FixedValue=0.4
        NutrientPoolFunctions DMDemands
          Constant Structural: FixedValue=0
          Constant Metabolic: FixedValue=0
          Constant Storage: FixedValue=0
        NutrientPoolFunctions NDemands: same as Replacements.SCRUM.Nodule.DMDemands
      CompositeBiomass Total: OrganNames=[Stover, Product, Root]; IncludeLive=true; IncludeDead=true
      CompositeBiomass AboveGround: OrganNames=[Stover, Product]; IncludeLive=true; IncludeDead=true
        Memo
          The AboveGround composite biomass object includes Stover and Product organs.
      Constant MortalityRate: FixedValue=0
      Constant LegumePropn: FixedValue=1
      Constant SeedMortalityRate: FixedValue=0
      MultiplyFunction TotalDMAtHarvest
        VariableReference ProductDryYield: VariableName=[Product].DryYield
        DivideFunction InvertedHI
          Constant One: FixedValue=1
          VariableReference HarvestIndex: VariableName=[Product].HarvestIndex
        DivideFunction InvertedAboveGroundPropn
          Constant One: FixedValue=1
          SubtractFunction AboveGroundFunction
            Constant One: FixedValue=1
            VariableReference RootPropn: VariableName=[Root].RootProportion
        Constant InvertedRelativeMaturityAtHarvest: FixedValue=0
          Memo Param value set at establishment
            SCRUM calculates this parameter value during run-time when the crop is established from parameter values set in the relevent SCRUMcrop and SCRUMmanagement objects
      Constant MaxNConcAtSeedling: FixedValue=0.04
        Memo Param value set at establishment
          SCRUM calculates this parameter value during run-time when the crop is established from parameter values set in the relevent SCRUMcrop and SCRUMmanagement objects
    Report: EventNames=[Clock].DoReport
      VariableNames:
        [Clock].Today
        [Fertiliser].NitrogenApplied
        [Irrigation].IrrigationApplied
        [SCRUM].Arbitrator.FN
        [SCRUM].Phenology.CurrentPhase.Name
        [SCRUM].Phenology.Stage
        [SCRUM].Product.DryMatterContent
        [SCRUM].Product.Live.N
        [SCRUM].Product.Live.NConc
        [SCRUM].Product.Live.Wt
        [SCRUM].Product.Yield
        [SCRUM].Root.Depth
        [SCRUM].Root.Live.N
        [SCRUM].Root.Live.NConc
        [SCRUM].Root.Live.Wt
        [SCRUM].Root.NUptakeLayered
        [SCRUM].SowingData.Cultivar
        [SCRUM].Stover.CoverDead
        [SCRUM].Stover.CoverGreen
        [SCRUM].Stover.CoverTotal
        [SCRUM].Stover.Fw
        [SCRUM].Stover.Height
        [SCRUM].Stover.LAI
        [SCRUM].Stover.Live.N
        [SCRUM].Stover.Live.NConc
        [SCRUM].Stover.Live.Wt
        [SCRUM].Stover.Transpiration
        [SCRUM].Stover.WaterDemand
        [SCRUM].Total.N
        [SCRUM].Total.Wt
        [ScrumRotation].CanFertiliseCurrent
        [Soil].SoilWater.Flux
        [Soil].SoilWater.FlowNO3
        [Soil].SoilWater.FlowNH4
        [Soil].SoilWater.FlowUrea
        [Soil].Water.MM
        [SurfaceOrganicMatter].Cover
        [SurfaceOrganicMatter].N
        [SurfaceOrganicMatter].wt
    ScrumCropInstance Potato: HarvestIndex=0.9; MoistureContent=0.8; Proot=0.1; MaxRD=600; MaxHeight=100; MaxCover=0.95; ExtinctCoeff=0.55; RootNConc=0.01; StoverNConc=0.009; ProductNConc=0.012; SeedlingNConc=0.04; BaseT=5; OptT=30; MaxT=40; GSMax=0.008; R50=150; LegumePropn=0; WaterStress=true; PlantingDepth=0; TtEstabToHarv=0; ExpectedYield=0; FieldLoss=0; ResidueRemoval=0
    ScrumCropInstance Wheat: HarvestIndex=0.5; MoistureContent=0.14; Proot=0.1; MaxRD=2000; MaxHeight=1800; MaxCover=0.97; ExtinctCoeff=0.55; RootNConc=0.01; StoverNConc=0.009; ProductNConc=0.012; SeedlingNConc=0.03; BaseT=0; OptT=30; MaxT=40; GSMax=0.008; R50=150; LegumePropn=0; WaterStress=true; PlantingDepth=0; TtEstabToHarv=0; ExpectedYield=0; FieldLoss=0; ResidueRemoval=0
    ScrumCropInstance OatForage: HarvestIndex=0.95; MoistureContent=0; Proot=0.1; MaxRD=1000; MaxHeight=700; MaxCover=0.97; ExtinctCoeff=0.8; RootNConc=0.01; StoverNConc=0.02; ProductNConc=0.03; SeedlingNConc=0.05; BaseT=5; OptT=30; MaxT=40; GSMax=0.008; R50=150; LegumePropn=0; WaterStress=true; PlantingDepth=0; TtEstabToHarv=0; ExpectedYield=0; FieldLoss=0; ResidueRemoval=0
    ScrumCropInstance Carrot: HarvestIndex=0.7; MoistureContent=0.88; Proot=0.1; MaxRD=1000; MaxHeight=400; MaxCover=0.9; ExtinctCoeff=0.7; RootNConc=0.01; StoverNConc=0.009; ProductNConc=0.012; SeedlingNConc=0.03; BaseT=3; OptT=30; MaxT=40; GSMax=0.008; R50=150; LegumePropn=0; WaterStress=true; PlantingDepth=0; TtEstabToHarv=0; ExpectedYield=0; FieldLoss=0; ResidueRemoval=0
    ScrumCropInstance TurnipForage: HarvestIndex=0.8; MoistureContent=0; Proot=0.1; MaxRD=1000; MaxHeight=400; MaxCover=0.95; ExtinctCoeff=0.85; RootNConc=0.01; StoverNConc=0.009; ProductNConc=0.012; SeedlingNConc=0.03; BaseT=3; OptT=30; MaxT=40; GSMax=0.008; R50=150; LegumePropn=0; WaterStress=true; PlantingDepth=0; TtEstabToHarv=0; ExpectedYield=0; FieldLoss=0; ResidueRemoval=0
    ScrumCropInstance Broccoli: HarvestIndex=0.3; MoistureContent=0.8; Proot=0.1; MaxRD=1000; MaxHeight=800; MaxCover=0.8; ExtinctCoeff=0.85; RootNConc=0.01; StoverNConc=0.015; ProductNConc=0.015; SeedlingNConc=0.05; BaseT=3; OptT=30; MaxT=40; GSMax=0.008; R50=150; LegumePropn=0; WaterStress=true; PlantingDepth=0; TtEstabToHarv=0; ExpectedYield=0; FieldLoss=0; ResidueRemoval=0
    ScrumCropInstance Cabbage: HarvestIndex=0.8; MoistureContent=0.8; Proot=0.1; MaxRD=1000; MaxHeight=800; MaxCover=0.8; ExtinctCoeff=0.85; RootNConc=0.01; StoverNConc=0.015; ProductNConc=0.012; SeedlingNConc=0.05; BaseT=3; OptT=30; MaxT=40; GSMax=0.008; R50=150; LegumePropn=0; WaterStress=true; PlantingDepth=0; TtEstabToHarv=0; ExpectedYield=0; FieldLoss=0; ResidueRemoval=0
    ScrumCropInstance Peas: HarvestIndex=0.4; MoistureContent=0.2; Proot=0.1; MaxRD=600; MaxHeight=600; MaxCover=0.98; ExtinctCoeff=0.85; RootNConc=0.01; StoverNConc=0.015; ProductNConc=0.02; SeedlingNConc=0.05; BaseT=5; OptT=30; MaxT=40; GSMax=0.008; R50=150; LegumePropn=1; WaterStress=true; PlantingDepth=0; TtEstabToHarv=0; ExpectedYield=0; FieldLoss=0; ResidueRemoval=0
    ScrumCropInstance SilverBeat: HarvestIndex=0.8; MoistureContent=0.85; Proot=0.1; MaxRD=1000; MaxHeight=800; MaxCover=0.85; ExtinctCoeff=0.7; RootNConc=0.01; StoverNConc=0.02; ProductNConc=0.035; SeedlingNConc=0.05; BaseT=3; OptT=30; MaxT=40; GSMax=0.008; R50=150; LegumePropn=1; WaterStress=true; PlantingDepth=0; TtEstabToHarv=0; ExpectedYield=0; FieldLoss=0; ResidueRemoval=0
    ScrumCropInstance LetticeIceBerg: HarvestIndex=0.8; MoistureContent=0.9; Proot=0.1; MaxRD=600; MaxHeight=500; MaxCover=0.85; ExtinctCoeff=0.75; RootNConc=0.01; StoverNConc=0.02; ProductNConc=0.025; SeedlingNConc=0.05; BaseT=3; OptT=30; MaxT=40; GSMax=0.008; R50=150; LegumePropn=1; WaterStress=true; PlantingDepth=0; TtEstabToHarv=0; ExpectedYield=0; FieldLoss=0; ResidueRemoval=0
    ScrumCropInstance LetticeFancy: HarvestIndex=0.8; MoistureContent=0.85; Proot=0.1; MaxRD=600; MaxHeight=500; MaxCover=0.85; ExtinctCoeff=0.7; RootNConc=0.01; StoverNConc=0.025; ProductNConc=0.035; SeedlingNConc=0.05; BaseT=3; OptT=30; MaxT=40; GSMax=0.008; R50=150; LegumePropn=1; WaterStress=true; PlantingDepth=0; TtEstabToHarv=0; ExpectedYield=0; FieldLoss=0; ResidueRemoval=0
    ScrumCropInstance PakChoi: HarvestIndex=0.8; MoistureContent=0.85; Proot=0.1; MaxRD=500; MaxHeight=400; MaxCover=0.75; ExtinctCoeff=0.6; RootNConc=0.01; StoverNConc=0.02; ProductNConc=0.03; SeedlingNConc=0.05; BaseT=3; OptT=30; MaxT=40; GSMax=0.008; R50=150; LegumePropn=1; WaterStress=true; PlantingDepth=0; TtEstabToHarv=0; ExpectedYield=0; FieldLoss=0; ResidueRemoval=0
    ScrumCropInstance SweetCorn: HarvestIndex=0.4; MoistureContent=0.35; Proot=0.1; MaxRD=1500; MaxHeight=1500; MaxCover=0.9; ExtinctCoeff=0.55; RootNConc=0.01; StoverNConc=0.009; ProductNConc=0.012; SeedlingNConc=0.04; BaseT=7; OptT=30; MaxT=40; GSMax=0.008; R50=150; LegumePropn=0; WaterStress=true; PlantingDepth=0; TtEstabToHarv=0; ExpectedYield=0; FieldLoss=0; ResidueRemoval=0
    ScrumCropInstance Onion: HarvestIndex=0.85; MoistureContent=0.25; Proot=0.1; MaxRD=500; MaxHeight=400; MaxCover=0.8; ExtinctCoeff=0.5; RootNConc=0.01; StoverNConc=0.009; ProductNConc=0.012; SeedlingNConc=0.03; BaseT=3; OptT=30; MaxT=40; GSMax=0.008; R50=150; LegumePropn=0; WaterStress=true; PlantingDepth=0; TtEstabToHarv=0; ExpectedYield=0; FieldLoss=0; ResidueRemoval=0
  Experiment ManagementTest
    Memo
      In this test we use SCRUM to represent differnt crops in two different rotation treatments (Potatoes -> Wheat -> Potatoes and Potatoes -> Peas -> Potatoes) with two irrigation (W1 and W2) and three N fertiliser treatments (N0, N1 and N2).  These rotations ran over three years and were conducted to provide data for testing N leaching predictions of different models.  SCRUM yields were set to the High N full irrigation treatment values for each crop and SCRUMs N and water responses were allowed to predict any differences in crop N uptake.  It is importnat to note that the soilN organic matter degridation coefficients were set to custom (non-release) values as this has been necessary to predict accurate N mineralisation values in new zealand arable soils.

      SCRUM gave reasionable predictions of Product N removals, soil water contents and accumulated leaching from each crop treatment.  This provides further support that SCRUM is adequate for the task of providing realistic N and Water uptakes for the purpose of N and water balance studies.
    Factors
      Permutation
        Factor Location
          CompositeFactor 0
            Specifications=[Weather].FileName = C:\GitHubRepos\Weather\NZWide\APSIMmet\Ashburton.met
        Factor Rot
          CompositeFactor 1
        Factor PAW60
          CompositeFactor 39
            Specifications:
              [Physical]
              [SoilWater]
              [Water]
            Physical
              Thickness  ParticleSizeClay  ParticleSizeSand  ParticleSizeSilt  BD    AirDry  LL15  DUL   SAT   KS
              300        22.5              27.5              50                1.09  0.05    0.05  0.17  0.34  508
              300        22.5              27.5              50                1.09  0.01    0.01  0.02  0.03  508
              300        22.5              27.5              50                1.09  0.01    0.01  0.02  0.03  508
              300        22.5              27.5              50                1.09  0.01    0.01  0.02  0.03  508
              300        22.5              27.5              50                1.09  0.01    0.01  0.02  0.03  508
              SoilCrop SCRUMSoil: LL=[0.05, 0.01, 0.01, 0.01, 0.01]; KL=[0.08, 0.08, 0.08, 0.08, 0.08]; XF=[1, 1, 1, 1, 1]
            WaterBalance SoilWater: SummerDate=1-Oct; SummerU=8; SummerCona=4; WinterDate=1-Apr; WinterU=4; WinterCona=1.5; DiffusConst=0; DiffusSlope=0; Salb=0.2; CN2Bare=60; CNRed=10; CNCov=0.8; DischargeWidth=0; CatchmentArea=0; PSIDul=-100; Thickness=[300, 300, 300, 300, 300]; SWCON=[0.5, 0.5, 0.43, 0.375, 0.34]
            Water: Thickness=[300, 300, 300, 300, 300]; InitialValues=[0.17, 0.02, 0.02, 0.02, 0.02]; InitialPAWmm=48; RelativeTo=LL15; FilledFromTop=false
          CompositeFactor 66
            Specifications:
              [Physical]
              [SoilWater]
              [Water]
            Physical
              Thickness  ParticleSizeClay  ParticleSizeSand  ParticleSizeSilt  BD    AirDry  LL15  DUL   SAT   KS
              300        22.5              27.5              50                1.22  0.1     0.1   0.24  0.37  170
              300        22.5              27.5              50                1.22  0.04    0.04  0.12  0.23  170
              300        22.5              27.5              50                1.22  0.02    0.02  0.08  0.22  170
              300        22.5              27.5              50                1.22  0.02    0.02  0.08  0.22  170
              300        22.5              27.5              50                1.22  0.02    0.02  0.08  0.22  170
              SoilCrop SCRUMSoil: LL=[0.1, 0.04, 0.02, 0.02, 0.02]; KL=[0.08, 0.08, 0.08, 0.08, 0.08]; XF=[1, 1, 1, 1, 1]
            WaterBalance SoilWater: SummerDate=1-Oct; SummerU=8; SummerCona=4; WinterDate=1-Apr; WinterU=4; WinterCona=1.5; DiffusConst=0; DiffusSlope=0; Salb=0.2; CN2Bare=60; CNRed=10; CNCov=0.8; DischargeWidth=0; CatchmentArea=0; PSIDul=-100; Thickness=[300, 300, 300, 300, 300]; SWCON=[0.5, 0.5, 0.15, 0.15, 0.15]
            Water: Thickness=[300, 300, 300, 300, 300]; InitialValues=[0.24, 0.12, 0.08, 0.08, 0.08]; InitialPAWmm=153; RelativeTo=LL15; FilledFromTop=false
          CompositeFactor 93
            Specifications:
              [Physical]
              [SoilWater]
              [Water]
            Physical
              Thickness  ParticleSizeClay  ParticleSizeSand  ParticleSizeSilt  BD    AirDry  LL15  DUL   SAT   KS
              300        22.5              27.5              50                1.09  0.18    0.18  0.39  0.53  508
              300        22.5              27.5              50                1.09  0.07    0.07  0.17  0.29  508
              300        22.5              27.5              50                1.09  0.02    0.02  0.08  0.21  508
              300        22.5              27.5              50                1.09  0.02    0.02  0.08  0.21  508
              300        22.5              27.5              50                1.09  0.02    0.02  0.08  0.21  508
              SoilCrop SCRUMSoil: LL=[0.18, 0.07, 0.02, 0.02, 0.02]; KL=[0.08, 0.08, 0.08, 0.08, 0.08]; XF=[1, 1, 1, 1, 1]
            WaterBalance SoilWater: same as ManagementTest.Factors.Permutation.PAW60.39.SoilWater
            Water: Thickness=[300, 300, 300, 300, 300]; InitialValues=[0.39, 0.17, 0.08, 0.08, 0.08]; InitialPAWmm=213; RelativeTo=LL15; FilledFromTop=false
          CompositeFactor 123
            Specifications:
              [Physical]
              [SoilWater]
              [Water]
            Physical
              Thickness  ParticleSizeClay  ParticleSizeSand  ParticleSizeSilt  BD    AirDry  LL15  DUL   SAT   KS
              300        22.5              27.5              50                0.94  0.19    0.19  0.41  0.54  103
              300        22.5              27.5              50                0.94  0.15    0.15  0.24  0.45  103
              300        22.5              27.5              50                0.94  0.06    0.06  0.21  0.42  103
              300        22.5              27.5              50                0.94  0.06    0.06  0.21  0.42  103
              300        22.5              27.5              50                0.94  0.06    0.06  0.21  0.42  103
              SoilCrop SCRUMSoil: LL=[0.19, 0.15, 0.06, 0.06, 0.06]; KL=[0.08, 0.08, 0.08, 0.08, 0.08]; XF=[1, 1, 1, 1, 1]
            WaterBalance SoilWater: SummerDate=1-Oct; SummerU=8; SummerCona=4; WinterDate=1-Apr; WinterU=4; WinterCona=1.5; DiffusConst=0; DiffusSlope=0; Salb=0.2; CN2Bare=60; CNRed=10; CNCov=0.8; DischargeWidth=0; CatchmentArea=0; PSIDul=-100; Thickness=[300, 300, 300, 300, 300]; SWCON=[0.5, 0.5, 0.1, 0.1, 0.1]
            Water: Thickness=[300, 300, 300, 300, 300]; InitialValues=[0.41, 0.24, 0.21, 0.21, 0.21]; InitialPAWmm=357; RelativeTo=LL15; FilledFromTop=false
          CompositeFactor 147
            Specifications:
              [Physical]
              [SoilWater]
              [Water]
            Physical
              Thickness  ParticleSizeClay  ParticleSizeSand  ParticleSizeSilt  BD    AirDry  LL15  DUL   SAT   KS
              300        22.5              27.5              50                0.87  0.19    0.19  0.44  0.67  508
              300        22.5              27.5              50                0.87  0.17    0.17  0.41  0.65  508
              300        22.5              27.5              50                0.87  0.14    0.14  0.36  0.6   508
              300        22.5              27.5              50                0.87  0.14    0.14  0.36  0.6   508
              300        22.5              27.5              50                0.87  0.14    0.14  0.36  0.6   508
              SoilCrop SCRUMSoil: LL=[0.19, 0.17, 0.14, 0.14, 0.14]; KL=[0.08, 0.08, 0.08, 0.08, 0.08]; XF=[1, 1, 1, 1, 1]
            WaterBalance SoilWater: same as ManagementTest.Factors.Permutation.PAW60.39.SoilWater
            Water: Thickness=[300, 300, 300, 300, 300]; InitialValues=[0.44, 0.41, 0.36, 0.36, 0.36]; InitialPAWmm=552; RelativeTo=LL15; FilledFromTop=false
        Factor W
          CompositeFactor Nil: Specifications=[AutomaticIrrigation].Script.Irrigate = false
          CompositeFactor Some
            Specifications:
              [AutomaticIrrigation].Script.Irrigate = true
              [AutomaticIrrigation].Script.Refull_Frac = 0.8
              [AutomaticIrrigation].Script.Trigger_Frac = 0.4
          CompositeFactor Full
            Specifications:
              [AutomaticIrrigation].Script.Irrigate = true
              [AutomaticIrrigation].Script.Refull_Frac = 0.9
              [AutomaticIrrigation].Script.Trigger_Frac = 0.7
        Factor N
          CompositeFactor Nil_1
            Specifications:
              [SplitFertiliser].Script.Fertilise = false
              [SplitFertiliser].Script.RelativeFert = 0
              [SplitFertiliser].Script.Splits = 1
          CompositeFactor Nil_3
            Specifications:
              [SplitFertiliser].Script.Fertilise = false
              [SplitFertiliser].Script.RelativeFert = 0
              [SplitFertiliser].Script.Splits = 3
          CompositeFactor Nil_6
            Specifications:
              [SplitFertiliser].Script.Fertilise = false
              [SplitFertiliser].Script.RelativeFert = 0
              [SplitFertiliser].Script.Splits = 6
          CompositeFactor Half_1
            Specifications:
              [SplitFertiliser].Script.Fertilise = true
              [SplitFertiliser].Script.RelativeFert = 0.5
              [SplitFertiliser].Script.Splits = 1
          CompositeFactor Half_3
            Specifications:
              [SplitFertiliser].Script.Fertilise = true
              [SplitFertiliser].Script.RelativeFert = 0.5
              [SplitFertiliser].Script.Splits = 3
          CompositeFactor Half_6
            Specifications:
              [SplitFertiliser].Script.Fertilise = true
              [SplitFertiliser].Script.RelativeFert = 0.5
              [SplitFertiliser].Script.Splits = 6
          CompositeFactor Equal_1
            Specifications:
              [SplitFertiliser].Script.Fertilise = true
              [SplitFertiliser].Script.RelativeFert = 1.0
              [SplitFertiliser].Script.Splits = 1
          CompositeFactor Equal_3
            Specifications:
              [SplitFertiliser].Script.Fertilise = true
              [SplitFertiliser].Script.RelativeFert = 1.0
              [SplitFertiliser].Script.Splits = 3
          CompositeFactor Equal_6
            Specifications:
              [SplitFertiliser].Script.Fertilise = true
              [SplitFertiliser].Script.RelativeFert = 1.0
              [SplitFertiliser].Script.Splits = 6
          CompositeFactor Double_1
            Specifications:
              [SplitFertiliser].Script.Fertilise = true
              [SplitFertiliser].Script.RelativeFert = 2.0
              [SplitFertiliser].Script.Splits = 1
          CompositeFactor Double_3
            Specifications:
              [SplitFertiliser].Script.Fertilise = true
              [SplitFertiliser].Script.RelativeFert = 2.0
              [SplitFertiliser].Script.Splits = 3
          CompositeFactor Double_6
            Specifications:
              [SplitFertiliser].Script.Fertilise = true
              [SplitFertiliser].Script.RelativeFert = 2.0
              [SplitFertiliser].Script.Splits = 6
    Simulation BaseField
      Weather: FileName=C:\GitHubRepos\Weather\NZWide\APSIMmet\Ashburton.met
      Clock: End=2010-02-11
      Summary
      SoilArbitrator Soil Arbitrator
      Manager TreatmentID
```csharp
using Models.Soils;
using System.Data;
using System.IO;
using APSIM.Shared.Utilities;
using System.Xml.Serialization;
using Models;
using Models.PMF;
using System.Text;
using System.Collections.Generic;
using Models.Core;
using System;
using Newtonsoft.Json;
      

namespace Models
{
    [Serializable] 
    public class Script : Model
    {
        [JsonIgnore] public string Rotation { get; set; }
        [JsonIgnore] public string Irrigation { get; set; }
        [JsonIgnore] public string Nitrogen { get; set; }
        
        [JsonIgnore] public string TreatmentName { get; set; }
        
        [EventSubscribe("StartOfSimulation")]
        private void OnStartOfSimulation(object sender, EventArgs e)
        {
            TreatmentName = Rotation + "_" + Irrigation + "_" + Nitrogen;
        }
    }
}
```
      Zone Field: Area=1; Slope=0; AspectAngle=0; Altitude=50
        Soil: Region=Plains; State=Canterbury; Country=New Zealand; Latitude=0; Longitude=0
          DataSource=Generic profile descriptions provided by Trevor Webb and data for functional horizions based on SWAMP project results
          Comments=Bulk density values were measured on the fine earth fraction so values entered into apsim soil are adjusted down to account for stone content (assuming stones are inert from all soil process so their mass and volume is removed from model paramaters).  SAT, DUL, LL15 and Air dry have been adjusted down to account for stone content.  OC has not been adjusted so the model will get the correct carbon and N amounts using the adjusted BD.
          Chemical: Thickness=[100, 200, 200, 100, 300, 200, 100, 300]; PH=[6, 6, 6, 6, 6, 6, 6, 6]; PHUnits=Water
          Physical
            Thickness  BD     AirDry  LL15   DUL   SAT
            100        1      0.05    0.1    0.27  0.419
            200        1      0.05    0.1    0.27  0.395
            300        1.59   0.157   0.157  0.29  0.36
            200        1.57   0.173   0.173  0.3   0.366
            100        1.57   0.173   0.173  0.3   0.366
            200        1.6    0.165   0.165  0.3   0.358
            100        1.6    0.165   0.165  0.3   0.358
            300        1.601  0.115   0.115  0.3   0.316
            SoilCrop SCRUMSoil: LL=[0.1, 0.1, 0.157, 0.173, 0.173, 0.165, 0.165, 0.115]; KL=[0.1, 0.1, 0.1, 0.1, 0.1, 0.1, 0.1, 0.1]; XF=[1, 1, 1, 1, 1, 1, 1, 1]
          WaterBalance SoilWater: SummerDate=1-oct; SummerU=9; SummerCona=4.4; WinterDate=1-Apr; WinterU=2; WinterCona=1.5; DiffusConst=88; DiffusSlope=35; Salb=0.13; CN2Bare=73; CNRed=20; CNCov=0.8; PSIDul=-100; Thickness=[100, 200, 300, 200, 100, 200, 100, 300]; SWCON=[0.9, 0.6, 0.4, 0.4, 0.4, 0.9, 0.9, 0.9]
          Nutrient
          Organic: FOMCNRatio=31.5; CarbonUnits=Total
            Thickness  Carbon  SoilCNRatio  FBiom  FInert  FOM
            100        2.677   11           0.025  0.45    536.934
            200        2.784   11           0.025  0.6     359.917
            300        1.454   11           0.015  0.75    197.527
            200        0.383   11           0.01   0.9     132.406
            100        0.243   11           0.01   0.96    108.405
            200        0.243   11           0.01   0.96    72.6661
            100        0.243   11           0.01   0.96    59.4939
            300        0.243   11           0.01   0.96    32.651
          Water: Thickness=[100, 200, 300, 200, 100, 200, 100, 300]; InitialValues=[0.27, 0.27, 0.29, 0.3, 0.3, 0.3, 0.3, 0.225]; InitialPAWmm=202.5; RelativeTo=LL15; FilledFromTop=true
          CERESSoilTemperature Temperature
          Solute NO3: Thickness=[100, 200, 200, 100, 300, 200, 100, 300]; InitialValues=[35, 15, 6.08, 6.08, 0.849, 0.312, 0.625, 0.208]; InitialValuesUnits=ppm; WaterTableConcentration=0; D0=0; DepthConstant=0; MaxDepthSoluteAccessible=0; RunoffEffectivenessAtMovingSolute=0; MaxEffectiveRunoff=0
          Solute NH4: Thickness=[100, 200, 200, 100, 300, 200, 100, 300]; InitialValues=[6.18, 3.09, 0.673, 0.673, 0.552, 0.281, 0.062, 0.021]; InitialValuesUnits=ppm; WaterTableConcentration=0; D0=0; DepthConstant=0; MaxDepthSoluteAccessible=0; RunoffEffectivenessAtMovingSolute=0; MaxEffectiveRunoff=0
          Solute Urea: Thickness=[100, 200, 200, 100, 300, 200, 100, 300]; InitialValues=[0, 0, 0, 0, 0, 0, 0, 0]; InitialValuesUnits=kg/ha; WaterTableConcentration=0; D0=0; DepthConstant=0; MaxDepthSoluteAccessible=0; RunoffEffectivenessAtMovingSolute=0; MaxEffectiveRunoff=0
        SurfaceOrganicMatter: InitialResidueName=grass; InitialResidueType=grass; InitialResidueMass=2500; InitialStandingFraction=0; InitialCPR=0; InitialCNR=15
        MicroClimate: a_interception=0; b_interception=1; c_interception=0; d_interception=0; SoilHeatFluxFraction=0.4; MinimumHeightDiffForNewLayer=0; NightInterceptionFraction=0.5; ReferenceHeight=2
        Irrigation
        Fertiliser
        Plant SCRUM
        ScrumCropInstance Potato: same as Replacements.Potato
        ScrumCropInstance Wheat: same as Replacements.Wheat
        ScrumCropInstance OatForage: same as Replacements.OatForage
        ScrumCropInstance Carrot: same as Replacements.Carrot
        ScrumCropInstance TurnipForage: same as Replacements.TurnipForage
        ScrumRotation: CoefficientFile=C:\GitHubRepos\SVS\LossModelling\Rotation1.csv
        Manager SplitFertiliser
          Fertilise = True
          RelativeFert = 1
          Splits = 3
          FertiliserType = UreaN
```csharp
using Newtonsoft.Json;
using Models.PMF.Phen;
using Models.Soils.Nutrients;
using Models.Interfaces;
using APSIM.Shared.Utilities;
using Models.PMF;
using System.Xml.Serialization;
using Models.Soils;
using Models.Core;
using System;
using Models.PMF.Organs;
using Models.PMF.SimplePlantModels;
using System.Collections.Generic;

        
namespace Models
{
    [Serializable] 
    [System.Xml.Serialization.XmlInclude(typeof(Model))]
    public class Script : Model
    {
        [Link] private ISummary summary;
        [Link] private Fertiliser fertiliser;
        [Link] private Clock clock;
        [Link] private Plant SCRUM;
        [Link(ByName = true)]
        private ISolute NO3;
        [Link] private Soils.Soil Soil;
        [Link(Type = LinkType.Path, Path = "[SCRUM].Root")]
        private Root root;
        [Link(Type = LinkType.Path, Path = "[SCRUM].Phenology")]
        private Phenology phenology;
        [Link]
        private IPhysical soilPhysical;
        //Communication to other modules
       
        //User inputs from properties tab
        [Description("Fertilise (tick for yes)")]
        public bool Fertilise { get; set; }
        
        [Description("Type of fertiliser to apply? ")] 
        public Fertiliser.Types FertiliserType { get; set; }
        
        [Description("Fertiliser relative to Crop Demands")]
        public double RelativeFert {get; set;}
        
        [Description("Number of splits")]
        public int Splits {get; set;}
        
        private Dictionary<DateTime,double> ApplicationDates {get; set;}
        
        //Class members
        [JsonIgnore] private bool FertiliserIsAvailable { get; set; }
        
        [JsonIgnore] private ScrumCropInstance currentCrop { get; set; }
        
        [EventSubscribe("SCRUMTotalNDemand")]
        private void OnSCRUMTotalNDemand(object sender, ScrumFertDemandData sfdd)
        {
        	if((sfdd.FertDuration>0)&&(sfdd.TotalNDemand>0))
        	{
		    	int splitLength = (int) sfdd.FertDuration/Splits;
		    	double splitN = (sfdd.TotalNDemand * RelativeFert)/Splits;
		    	ApplicationDates = new Dictionary<DateTime,double>();
		    	for (int i = 0; i < Splits; i++)
		    	{
		    		DateTime nextAppn = clock.Today.AddDays(sfdd.NonFertDuration).AddDays(i*splitLength);
		    		ApplicationDates.Add(nextAppn,splitN);
		    	}
        	}
        }
        
        //Determine daily requirement for fertiliser
        [EventSubscribe("DoManagement")]
        private void OnDoManagement(object sender, EventArgs e)
        {
        	if (ApplicationDates != null)
        	{
		    	foreach(KeyValuePair<DateTime, double> entry in ApplicationDates)
					{
						if (entry.Key == clock.Today)
						{
							  fertiliser.Apply(entry.Value, Type: FertiliserType);
						}
					}
		    }
        }
        
        [EventSubscribe("PlantEnding")]
        private void OnPlantEnding(object sender, EventArgs e)
        {
            ApplicationDates = null;
        }
    }
}
```
        Report: same as Replacements.Report
        ScrumCropInstance Broccoli: same as Replacements.Broccoli
        ScrumCropInstance Cabbage: same as Replacements.Cabbage
        ScrumCropInstance Peas: same as Replacements.Peas
        ScrumCropInstance SilverBeat: same as Replacements.SilverBeat
        ScrumCropInstance LetticeIceBerg: same as Replacements.LetticeIceBerg
        ScrumCropInstance LetticeFancy: same as Replacements.LetticeFancy
        ScrumCropInstance PakChoi: same as Replacements.PakChoi
        ScrumCropInstance SweetCorn: same as Replacements.SweetCorn
        ScrumCropInstance Onion: same as Replacements.Onion
        Manager AutomaticIrrigation
          Irrigate = True
          Refull_Frac = -
          Trigger_Frac = -
          Season_Start = 1-Sep
          Season_End = 30-Apr
          Return_days = 2
          Maximum_Irrigation_Amount = 100
          Top_Depth = 600
```csharp
using Newtonsoft.Json;
using Models.PMF.Phen;
using APSIM.Shared.Utilities;
using System.Xml.Serialization;
using Models.Soils;
using Models.PMF;
using Models.Core;
using System;
using Models.PMF.Organs;
using Models.Interfaces;

        
namespace Models
{
    [Serializable] 
    [System.Xml.Serialization.XmlInclude(typeof(Model))]
    public class Script : Model
    {
        [Link] private ISummary summary;
        [Link] private Irrigation Irrigation;
        [Link] private Clock Clock;
        [Link] private Soil Soil;
        [Link] private Plant SCRUM;
        [Link(Type = LinkType.Path, Path = "[SCRUM].Root")]
        private Root root;
        [Link(Type = LinkType.Path, Path = "[SCRUM].Phenology")]
        private Phenology phenology;
        [Link]
        private IPhysical soilPhysical;
        [Link]
        private ISoilWater waterBalance;
        //Communication to other modules
       
        //User inputs from properties tab
        [Description("Irrigation on (yes or no)")]
        public bool Irrigate { get; set; }
        [Description("SeasonStart (dd-MMM)")]
        public string Season_Start { get; set; }
        [Description("SeasonEnd (dd-MMM)")]
        public string Season_End { get; set; }
        [Description("% PAWC to refill soil to (0-1)")]
        public double Refull_Frac { get; set; }
        [Description("% PAWC to trigger irrigation (0-1)")]
        public double Trigger_Frac { get; set; }
        [Description("Minimum days for irrigation to return")]
        public double Return_days { get; set; }
        [Description("Maximum irrigation application (mm)")]
        public double Maximum_Irrigation_Amount { get; set; }
        [Description("Depth to calculate PAWC (mm)")]
        public double Top_Depth { get; set; }
       
        //Class members
        [JsonIgnore] private bool IrrigationIsAvailable { get; set; }
        [JsonIgnore] public bool SeasonIsOpen { get; set; }
        [JsonIgnore] private bool CropIsActive { get; set; }
        [JsonIgnore] private bool IrrigatorIsAvailable { get; set; }
        [JsonIgnore] private bool SoilIsDry { get; set; }
        [JsonIgnore] public double Top_DUL { get; set; }
        [JsonIgnore] public double Top_Refull { get; set; }
        [JsonIgnore] public double Top_Trigger { get; set; }
        [JsonIgnore] public double Top_LL { get; set; }
        [JsonIgnore] public double Top_SW { get; set; }
        [JsonIgnore] public double Accumulated_depth { get; set; }
        [JsonIgnore] public double Days_since_irrigation { get; set; }
        [JsonIgnore] public double Amount_to_apply { get; set; }
        
        //Variables for date logic testing
        [JsonIgnore] public string StartString { get; set; }
        [JsonIgnore] public string EndString { get; set; }
        [JsonIgnore] public DateTime StartDate { get; set; }
        [JsonIgnore] public DateTime EndDate { get; set; }
        [JsonIgnore] public int TodayYear { get; set; }
        [JsonIgnore] public int TodayMonth { get; set; }
        [JsonIgnore] public int StartMonth { get; set; }
        [JsonIgnore] public int EndMonth { get; set; }
        [JsonIgnore] public int TodayDay { get; set; }
        [JsonIgnore] public int StartDay { get; set; }
        [JsonIgnore] public int EndDay { get; set; }
       
    
        //Calculate static soil variables
        [EventSubscribe("StartOfSimulation")]
        private void OnStartOfSimulation(object sender, EventArgs e)
        {   
            //Calculated soil water variables
            Accumulated_depth = 0;
            for (int layer = 0; Accumulated_depth < Top_Depth; layer++)
            {
                Top_LL += soilPhysical.LL15mm[layer];
                Top_DUL += soilPhysical.DULmm[layer];
                Accumulated_depth += soilPhysical.Thickness[layer];
            }
            Top_Refull = Top_LL + (Top_DUL - Top_LL) * Refull_Frac;
        }
       
      
        //Determine daily requirement for irrigation
        [EventSubscribe("StartOfDay")]
        private void OnStartOfDay(object sender, EventArgs e)
        { 
            //Can we irrigate?
            IrrigationIsAvailable = false; 
            if (Irrigate)
                IrrigationIsAvailable = true; 
    
            //Are we Allowed to Irrigate?
            TodayYear = Clock.Today.Year;
            StartString = Season_Start + "-" + TodayYear.ToString();
            EndString = Season_End + "-" + TodayYear.ToString();
            StartDate = DateTime.Parse(StartString);
            EndDate = DateTime.Parse(EndString);
            TodayMonth = Clock.Today.Month;
            TodayDay = Clock.Today.Day;
            StartDay = StartDate.Day;
            StartMonth = StartDate.Month;
            EndDay = EndDate.Day;
            EndMonth = EndDate.Month;
          
            SeasonIsOpen = false;
            //if we are in the spring and after the start date then yes
            if ((Clock.Today.Month > 6) && (Clock.Today >= StartDate))
                SeasonIsOpen = true;
            //if we are in the autumn and before the end date then yes
            if ((Clock.Today.Month <= 6) && (Clock.Today <= EndDate))
                SeasonIsOpen = true;
          
            //Is there a crop in the ground that needs irrigation?
			CropIsActive = (SCRUM.IsAlive);
          
            //Is the irrigator available?
            IrrigatorIsAvailable = false;
            Days_since_irrigation += 1;
            if (Days_since_irrigation >= Return_days)
                IrrigatorIsAvailable = true;
          
            //Is the soil dry enough to require irrigation?
            SoilIsDry = false;
            double CurrentRootDepth = 0;
            double RootDepth = root.Depth;
            CurrentRootDepth = Math.Max(RootDepth, CurrentRootDepth);
          
            double RelativeRootDepth = Math.Min(1.0, CurrentRootDepth / Top_Depth);
            Top_Trigger = Math.Min(Top_Refull, Top_DUL - (Top_DUL - Top_LL) * RelativeRootDepth * (1 - Trigger_Frac)); 
          
            Accumulated_depth = 0;
            Top_SW = 0;
            for (int layer = 0; Accumulated_depth < Top_Depth; layer++)
            {
                Top_SW += waterBalance.SWmm[layer];
                Accumulated_depth += soilPhysical.Thickness[layer];
            }
            if (Top_SW <= Top_Trigger)
                SoilIsDry = true;
                
            //Lets bloody well irrigate then!!!!
            if ((IrrigationIsAvailable) && (SeasonIsOpen) && (CropIsActive) && (IrrigatorIsAvailable) && (SoilIsDry)) //The conditions are rife for irrigation
            {
                Amount_to_apply = Math.Min(Top_Refull - Top_SW, Maximum_Irrigation_Amount);
                Amount_to_apply = Math.Max(Amount_to_apply, 0.0);
                Irrigation.Apply(Amount_to_apply);
                Days_since_irrigation = 0;
                summary.WriteMessage(this, "Automatic Irrigation", MessageType.Diagnostic);
            
            }
        }
    }
}
```
  Experiment RotationTest
    Memo: same as ManagementTest.memo
    Factors
      Permutation
        Factor Location
          CompositeFactor 0
            Specifications=[Weather].FileName = C:\GitHubRepos\Weather\NZWide\APSIMmet\Ashburton.met
        Factor Rot
          CompositeFactor 1
            Specifications=[ScrumRotation].CoefficientFile = C:\GitHubRepos\SVS\LossModelling\Rotation1.csv
          CompositeFactor 2
            Specifications=[ScrumRotation].CoefficientFile = C:\GitHubRepos\SVS\LossModelling\Rotation2.csv
          CompositeFactor 3
            Specifications=[ScrumRotation].CoefficientFile = C:\GitHubRepos\SVS\LossModelling\Rotation3.csv
          CompositeFactor 4
            Specifications=[ScrumRotation].CoefficientFile = C:\GitHubRepos\SVS\LossModelling\Rotation4.csv
          CompositeFactor 5
            Specifications=[ScrumRotation].CoefficientFile = C:\GitHubRepos\SVS\LossModelling\Rotation5.csv
        Factor PAW60
          CompositeFactor 123
            Specifications:
              [Physical]
              [SoilWater]
              [Water]
            Physical: same as ManagementTest.Factors.Permutation.PAW60.123.Physical
            WaterBalance SoilWater: same as ManagementTest.Factors.Permutation.PAW60.123.SoilWater
            Water: Thickness=[300, 300, 300, 300, 300]; InitialValues=[0.41, 0.24, 0.21, 0.21, 0.21]; InitialPAWmm=228; RelativeTo=LL15; FilledFromTop=false
        Factor W
          CompositeFactor Full
            Specifications:
              [AutomaticIrrigation].Script.Irrigate = true
              [AutomaticIrrigation].Script.Refull_Frac = 0.9
              [AutomaticIrrigation].Script.Trigger_Frac = 0.7
        Factor N
          CompositeFactor Double_6
            Specifications:
              [SplitFertiliser].Script.Fertilise = true
              [SplitFertiliser].Script.RelativeFert = 2.0
              [SplitFertiliser].Script.Splits = 6
    Simulation BaseField2
      Weather: FileName=C:\GitHubRepos\Weather\NZWide\APSIMmet\Ashburton.met
      Clock: End=2013-02-11
      Summary
      SoilArbitrator Soil Arbitrator
      Manager TreatmentID: same as ManagementTest.BaseField.TreatmentID
      Zone Field: Area=1; Slope=0; AspectAngle=0; Altitude=50
        Soil: same as ManagementTest.BaseField.Field.Soil
        SurfaceOrganicMatter: InitialResidueName=grass; InitialResidueType=grass; InitialResidueMass=2500; InitialStandingFraction=0; InitialCPR=0; InitialCNR=15
        MicroClimate: a_interception=0; b_interception=1; c_interception=0; d_interception=0; SoilHeatFluxFraction=0.4; MinimumHeightDiffForNewLayer=0; NightInterceptionFraction=0.5; ReferenceHeight=2
        Irrigation
        Fertiliser
        Plant SCRUM
        ScrumRotation: CoefficientFile=C:\GitHubRepos\SVS\LossModelling\Rotation5.csv
        Manager SplitFertiliser: same as ManagementTest.BaseField.Field.SplitFertiliser
        Manager AutomaticIrrigation
          Irrigate = True
          Refull_Frac = -
          Trigger_Frac = -
          Season_Start = 1-Sep
          Season_End = 30-Apr
          Return_days = 2
          Maximum_Irrigation_Amount = 100
          Top_Depth = 600
          script: same as in ManagementTest.BaseField.Field.AutomaticIrrigation
        ScrumCropInstance Potato: same as Replacements.Potato
        ScrumCropInstance Wheat: same as Replacements.Wheat
        ScrumCropInstance OatForage: same as Replacements.OatForage
        ScrumCropInstance Carrot: same as Replacements.Carrot
        ScrumCropInstance TurnipForage: same as Replacements.TurnipForage
        ScrumCropInstance Broccoli: same as Replacements.Broccoli
        ScrumCropInstance Cabbage: same as Replacements.Cabbage
        ScrumCropInstance Peas: same as Replacements.Peas
        ScrumCropInstance SilverBeat: same as Replacements.SilverBeat
        ScrumCropInstance LetticeIceBerg: same as Replacements.LetticeIceBerg
        ScrumCropInstance LetticeFancy: same as Replacements.LetticeFancy
        ScrumCropInstance PakChoi: same as Replacements.PakChoi
        ScrumCropInstance SweetCorn: same as Replacements.SweetCorn
        ScrumCropInstance Onion: same as Replacements.Onion
        Report: same as Replacements.Report
  Experiment LocationTest
    Memo: same as ManagementTest.memo
    Factors
      Permutation
        Factor Location
          CompositeFactor Ashburton
            Specifications=[Weather].FileName = C:\GitHubRepos\Weather\NZWide\APSIMmet\Ashburton.met
          CompositeFactor Balclutha
            Specifications=[Weather].FileName = C:\GitHubRepos\Weather\NZWide\APSIMmet\Balclutha.met
          CompositeFactor Blenheim
            Specifications=[Weather].FileName = C:\GitHubRepos\Weather\NZWide\APSIMmet\Blenheim.met
          CompositeFactor Christchurch
            Specifications=[Weather].FileName = C:\GitHubRepos\Weather\NZWide\APSIMmet\Christchurch.met
          CompositeFactor Culverden
            Specifications=[Weather].FileName = C:\GitHubRepos\Weather\NZWide\APSIMmet\Culverden.met
          CompositeFactor Dannevirke
            Specifications=[Weather].FileName = C:\GitHubRepos\Weather\NZWide\APSIMmet\Dannevirke.met
          CompositeFactor Dargaville
            Specifications=[Weather].FileName = C:\GitHubRepos\Weather\NZWide\APSIMmet\Dargaville.met
          CompositeFactor Dunedin
            Specifications=[Weather].FileName = C:\GitHubRepos\Weather\NZWide\APSIMmet\Dunedin.met
          CompositeFactor Gisborne
            Specifications=[Weather].FileName = C:\GitHubRepos\Weather\NZWide\APSIMmet\Gisborne.met
          CompositeFactor Gore
            Specifications=[Weather].FileName = C:\GitHubRepos\Weather\NZWide\APSIMmet\Gore.met
          CompositeFactor Hamilton
            Specifications=[Weather].FileName = C:\GitHubRepos\Weather\NZWide\APSIMmet\Hamilton.met
          CompositeFactor Hastings
            Specifications=[Weather].FileName = C:\GitHubRepos\Weather\NZWide\APSIMmet\Hastings.met
          CompositeFactor Hokitika
            Specifications=[Weather].FileName = C:\GitHubRepos\Weather\NZWide\APSIMmet\Hokitika.met
          CompositeFactor Invercargill
            Specifications=[Weather].FileName = C:\GitHubRepos\Weather\NZWide\APSIMmet\Invercargill.met
          CompositeFactor Kaitaia
            Specifications=[Weather].FileName = C:\GitHubRepos\Weather\NZWide\APSIMmet\Kaitaia.met
          CompositeFactor Kerikeri
            Specifications=[Weather].FileName = C:\GitHubRepos\Weather\NZWide\APSIMmet\Kerikeri.met
          CompositeFactor Lauder
            Specifications=[Weather].FileName = C:\GitHubRepos\Weather\NZWide\APSIMmet\Lauder.met
          CompositeFactor Levin
            Specifications=[Weather].FileName = C:\GitHubRepos\Weather\NZWide\APSIMmet\Levin.met
          CompositeFactor Lincoln
            Specifications=[Weather].FileName = C:\GitHubRepos\Weather\NZWide\APSIMmet\Lincoln.met
          CompositeFactor Lumsden
            Specifications=[Weather].FileName = C:\GitHubRepos\Weather\NZWide\APSIMmet\Lumsden.met
          CompositeFactor Manukau
            Specifications=[Weather].FileName = C:\GitHubRepos\Weather\NZWide\APSIMmet\Manukau.met
          CompositeFactor Martinborough
            Specifications=[Weather].FileName = C:\GitHubRepos\Weather\NZWide\APSIMmet\Martinborough.met
          CompositeFactor Masterton
            Specifications=[Weather].FileName = C:\GitHubRepos\Weather\NZWide\APSIMmet\Masterton.met
          CompositeFactor Matamata
            Specifications=[Weather].FileName = C:\GitHubRepos\Weather\NZWide\APSIMmet\Matamata.met
          CompositeFactor Middlemarch
            Specifications=[Weather].FileName = C:\GitHubRepos\Weather\NZWide\APSIMmet\Middlemarch.met
          CompositeFactor Motueka
            Specifications=[Weather].FileName = C:\GitHubRepos\Weather\NZWide\APSIMmet\Motueka.met
          CompositeFactor Napier
            Specifications=[Weather].FileName = C:\GitHubRepos\Weather\NZWide\APSIMmet\Napier.met
          CompositeFactor Nelson
            Specifications=[Weather].FileName = C:\GitHubRepos\Weather\NZWide\APSIMmet\Nelson.met
          CompositeFactor NewPlymouth
            Specifications=[Weather].FileName = C:\GitHubRepos\Weather\NZWide\APSIMmet\NewPlymouth.met
          CompositeFactor NorthAuckland
            Specifications=[Weather].FileName = C:\GitHubRepos\Weather\NZWide\APSIMmet\NorthAuckland.met
          CompositeFactor Oamaru
            Specifications=[Weather].FileName = C:\GitHubRepos\Weather\NZWide\APSIMmet\Oamaru.met
          CompositeFactor Ohakune
            Specifications=[Weather].FileName = C:\GitHubRepos\Weather\NZWide\APSIMmet\Ohakune.met
          CompositeFactor PalmerstonNorth
            Specifications=[Weather].FileName = C:\GitHubRepos\Weather\NZWide\APSIMmet\PalmerstonNorth.met
          CompositeFactor Paraparaumu
            Specifications=[Weather].FileName = C:\GitHubRepos\Weather\NZWide\APSIMmet\Paraparaumu.met
          CompositeFactor Pukekohe
            Specifications=[Weather].FileName = C:\GitHubRepos\Weather\NZWide\APSIMmet\Pukekohe.met
          CompositeFactor Rotorua
            Specifications=[Weather].FileName = C:\GitHubRepos\Weather\NZWide\APSIMmet\Rotorua.met
          CompositeFactor Taupō
            Specifications=[Weather].FileName = C:\GitHubRepos\Weather\NZWide\APSIMmet\Taupō.met
          CompositeFactor Tauranga
            Specifications=[Weather].FileName = C:\GitHubRepos\Weather\NZWide\APSIMmet\Tauranga.met
          CompositeFactor Timaru
            Specifications=[Weather].FileName = C:\GitHubRepos\Weather\NZWide\APSIMmet\Timaru.met
          CompositeFactor Waipawa
            Specifications=[Weather].FileName = C:\GitHubRepos\Weather\NZWide\APSIMmet\Waipawa.met
          CompositeFactor Wellington
            Specifications=[Weather].FileName = C:\GitHubRepos\Weather\NZWide\APSIMmet\Wellington.met
          CompositeFactor Whakatane
            Specifications=[Weather].FileName = C:\GitHubRepos\Weather\NZWide\APSIMmet\Whakatane.met
          CompositeFactor Whanganui
            Specifications=[Weather].FileName = C:\GitHubRepos\Weather\NZWide\APSIMmet\Whanganui.met
          CompositeFactor Whangarei
            Specifications=[Weather].FileName = C:\GitHubRepos\Weather\NZWide\APSIMmet\Whangarei.met
          CompositeFactor Whitianga
            Specifications=[Weather].FileName = C:\GitHubRepos\Weather\NZWide\APSIMmet\Whitianga.met
        Factor Rot
          CompositeFactor 1
            Specifications=[ScrumRotation].CoefficientFile = C:\GitHubRepos\SVS\LossModelling\Rotation1.csv
        Factor PAW60
          CompositeFactor 39: same as ManagementTest.Factors.Permutation.PAW60.39
        Factor W
          CompositeFactor Full
            Specifications:
              [AutomaticIrrigation].Script.Irrigate = true
              [AutomaticIrrigation].Script.Refull_Frac = 0.9
              [AutomaticIrrigation].Script.Trigger_Frac = 0.7
        Factor N
          CompositeFactor Double_6
            Specifications:
              [SplitFertiliser].Script.Fertilise = true
              [SplitFertiliser].Script.RelativeFert = 2.0
              [SplitFertiliser].Script.Splits = 6
    Simulation BaseField3
      Weather: FileName=C:\GitHubRepos\Weather\NZWide\APSIMmet\Ashburton.met
      Clock
      Summary
      SoilArbitrator Soil Arbitrator
      Manager TreatmentID: same as ManagementTest.BaseField.TreatmentID
      Zone Field: Area=1; Slope=0; AspectAngle=0; Altitude=50
        Soil: same as ManagementTest.BaseField.Field.Soil
        SurfaceOrganicMatter: InitialResidueName=grass; InitialResidueType=grass; InitialResidueMass=2500; InitialStandingFraction=0; InitialCPR=0; InitialCNR=15
        MicroClimate: a_interception=0; b_interception=1; c_interception=0; d_interception=0; SoilHeatFluxFraction=0.4; MinimumHeightDiffForNewLayer=0; NightInterceptionFraction=0.5; ReferenceHeight=2
        Irrigation
        Fertiliser
        Plant SCRUM
        ScrumCropInstance Potato: same as Replacements.Potato
        ScrumCropInstance Wheat: same as Replacements.Wheat
        ScrumCropInstance OatForage: same as Replacements.OatForage
        ScrumCropInstance Carrot: same as Replacements.Carrot
        ScrumCropInstance TurnipForage: same as Replacements.TurnipForage
        ScrumRotation: CoefficientFile=C:\GitHubRepos\SVS\LossModelling\Rotation1.csv
        Manager SplitFertiliser: same as ManagementTest.BaseField.Field.SplitFertiliser
        Report: same as Replacements.Report
        ScrumCropInstance Broccoli: same as Replacements.Broccoli
        ScrumCropInstance Cabbage: same as Replacements.Cabbage
        ScrumCropInstance Peas: same as Replacements.Peas
        ScrumCropInstance SilverBeat: same as Replacements.SilverBeat
        ScrumCropInstance LetticeIceBerg: same as Replacements.LetticeIceBerg
        ScrumCropInstance LetticeFancy: same as Replacements.LetticeFancy
        ScrumCropInstance PakChoi: same as Replacements.PakChoi
        ScrumCropInstance SweetCorn: same as Replacements.SweetCorn
        ScrumCropInstance Onion: same as Replacements.Onion
        Manager AutomaticIrrigation: same as RotationTest.BaseField2.Field.AutomaticIrrigation
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